*Heading
************************************************************************
** First run a free swelling simulation with a large plate_height
** Means deactivate the compression step
** Estimate the free swelling from the first run
** Make plate_height slightly smaller than free swelling height
** Compression step is likely to fail if plate is not in contact
** in the beginning of the compression step
** Free swelling step may fail if there is too much contact pressure
** To make sure it runs without trouble, some trial and error is needed
** from run to run.. It's just how it is!
************************************************************************
*Parameter
** geometric parameters, element properties, and material ID
nDim        = 2
nStress     = 4
nNode       = 4
nInt        = 4
fbar        = 0
matID       = 1
nIons       = 2
nIonProps   = 5
matProps    = 15 + nIons*nIonProps
intProps    = 5
nstatev     = (nIons + 2)
nsvars      = nstatev*nInt
nPostVars   = 2*nStress + nstatev
**
** physical constants and material properties
**
Rgas        = 8.3145
Fcon        = 96485.0
theta       = 298.0
phi0        = 0.31
rho         = 1100.0
Gshear      = 48.0e3
kappa       = 50.0*Gshear
pKa         = 5.0
Cp_fix      = 460.0
Vp          = 8.928e-3
Zp          = 1.0
mu0         = 0.0
Vw          = 1.8e-5
chi         = 0.40
Dw          = 9.0e-7
**
** properties of ions in gel
**
Cion1_gel   = 340.0
Cion2_gel   = 800.0
Omg0_1      = 0.
Omg0_2      = 0.
Vion_1      = 2.38e-6
Vion_2      = 2.24e-6
Zion_1      = 1.0
Zion_2      = -1.0
Dion_1      = 4.0e-8
Dion_2      = 4.0e-8
**
** initial conditions in gel (assuming zero electric potential and pressure)
**
RT          = Rgas*theta
Cw0_gel     = (1.0 - phi0)/Vw
**
initMU      = mu0 + RT*(phi0+log(1-phi0)+chi*phi0**2) - RT/Cw0_gel*(Cion1_gel + Cion2_gel)
initOmg1    = Omg0_1 + RT*log(Cion1_gel/Cw0_gel)
initOmg2    = Omg0_2 + RT*log(Cion2_gel/Cw0_gel)
**
** properties of ions in low salt solution
**
Cw_sol        = 55000.0
**
Cion1_sol     = 150.0
Cion2_sol     = 150.0
**
mu_sol        = mu0 - RT/Cw_sol*(Cion1_sol + Cion2_sol)
omg1_sol      = Omg0_1 + RT*log(Cion1_sol/Cw_sol)
omg2_sol      = Omg0_2 + RT*log(Cion2_sol/Cw_sol)
**
force         = 10.0
plate_height  = 4.41e-3
disp          = 2.0e-3
plate_length  = 12.5e-3
**
*************************************************************************
** time parameters
t_eql           = 1.0
tRamp_eql       = 0.1
dtInit_eql      = 1.0e-3
dtMax_eql       = 0.2
**
t_swell         = 1.0
tRamp_swl       = 0.1
dtInit_swl      = 1.0e-3
dtMax_swl       = 0.2
**
t_compress      = 1200.0
tRamp_comp      = 10.0
dtInit_comp     = 1.0e-6
dtMax_comp      = 10.0
**
dtMin           = 1.0e-15
**
************************************************************************
** GEOMETRY and MESH
************************************************************************
*Node
1,           0.,           0.
2, 0.00015366399,           0.
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*User Element,Type=U4,Nodes=<nNode>,Coordinates=<nDim>,Properties=<matProps>,Iproperties=<intProps>,Variables=<nsvars>,Unsymm
1,2,11,12,13
*Element, type=U4
1,   1,   2,  27,  26
2,   2,   3,  28,  27
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*System
*Nset, nset=all, generate
1,  425,    1
*Elset, elset=all, generate
1,  384,    1
*Nset, nset=bottom, generate
1,  25,   1
*Elset, elset=bottom, generate
1,  24,   1
*Nset, nset=left, generate
1,  401,   25
*Elset, elset=left, generate
1,  361,   24
*Nset, nset=right, generate
25,  425,   25
*Elset, elset=right, generate
24,  384,   24
*Nset, nset=top, generate
401,  425,    1
*Elset, elset=top, generate
361,  384,    1
*Surface, Type=Node , Name=TopSurf
Top
*Element, type=CAX4
100001, 1, 2, 27, 26
100002, 2, 3, 28, 27
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*Elset, elset=ElDummy, generate
100001,100384,1
** EXTRA ELEMENT
*Node
999996, 0.0, 0.0
999997, .00001, 0.0
999998, .00001, .00001
999999, 0.0, .00001
*Element, Type=CPE4T
999999,999996,999997,999998,999999
*Nset, nset=extraElement
999996,999997,999998,999999
*Elset,elset=extraElement
999999
**
************************************************************************
** RIGID SURFACE AND CONTACT CONDITIONS
************************************************************************
**
*Node
1000, 0, <plate_height>
*Nset, Nset=RigidRef
1000,
*Surface, type=SEGMENTS, name=RigidSurf
START, <plate_length>, <plate_height>
LINE, 0, <plate_height>
*Rigid Body, ref node=RigidRef, analytical surface=RigidSurf
**
**
*Contact Pair, Interaction=int, Type=node to surface
TopSurf,RigidSurf
**
*Surface Interaction, name=int
*Friction
0.0
*Surface Behavior, pressure-overclosure=hard
**
***************************************************************************
** MATERIAL DEFINITION
***************************************************************************
** Material properties for the Swellable Gel Elements
*uel property,elset=all
** Rgas Fcon theta phi0 rho Gshear kappa lam_L
<Rgas>, <Fcon>, <theta>, <phi0>, <rho>, <Gshear>, <kappa>, <pKa>,
** Cp_fx Vp Zp mu0 Vw chi Dw Cion(k)
<Cp_fix>, <Vp>, <Zp>, <mu0>, <Vw>, <chi>, <Dw>, <Cion1_gel>,
** Cion_gel(k) ... Omg0(k) ... Vion(k)
<Omg0_1>, <Vion_1>, <Zion_1>, <Dion_1>, <Cion2_gel>, <Omg0_2>, <Vion_2>, <Zion_2>,
** Zion(k) ... Dion(k) nInt fbar matID nIonProps nPostVars
<Dion_2>, <nInt>, <fbar>, <matID>, <nIonProps>, <nPostVars>
**
***************************************************************************
*Solid section, elset=ElDummy, material=DummyMaterial
*Material, name=DummyMaterial
*Elastic
1.e-20
** strain and stress vector (3+3) and polymer vol fraction as user output
*User output variables
<nPostVars>
***************************************************************************
*Solid section, elset=extraElement, material=extraMaterial
*Material, name=extraMaterial
*Elastic
1.e-20
*Conductivity
1.0
*Density
1.0
*Specific heat
1.0
************************************************************************
** AMPLITUDE DEFINITION
************************************************************************
** as-prepared to low salt solution
*Amplitude, name=mu_init_to_sol, definition = smooth step
0.0, <initMU>, <tRamp_swl>, <mu_sol>
*Amplitude, name=omg1_init_to_sol, definition = smooth step
0.0, <initOmg1>, <tRamp_swl>, <omg1_sol>
*Amplitude, name=omg2_init_to_sol, definition = smooth step
0.0, <initOmg2>, <tRamp_swl>, <omg2_sol>
**
*Amplitude, name=ForceAmp
0.0, 0.0, <tRamp_comp>, <force>
**
*Amplitude, name=DispAmp
0.0, 0.0, <tRamp_comp>, <disp>
************************************************************************
** INITIAL CONDITIONS
************************************************************************
** Define the initial chemical potential
*Initial conditions, type=temperature
all, <initMU>, <initOmg1>, <initOmg2>
** Define an arbitrary initial condition for the ‘‘extra’’ element.
*Initial conditions, type=temperature
extraElement, 0.0
************************************************************************
** STEP DEFINITION
************************************************************************
** this step equilibrates the gel to its as-prepared state
*Step, Name=init, nlgeom=yes, inc=50000, UNSYMM=YES
*Coupled temperature-displacement, stabilize, deltmx=1000.0
<dtInit_eql>, <t_eql>, <dtMin>, <dtMax_eql>
*CONTROLS, PARAMETERS=TIME INCREMENTATION
,,,,,,,30,,,,,,
*CONTROLS, PARAMETERS=LINE SEARCH
10,1.0,0.0001,0.25,0.10
*Boundary
left,1,1,0.0
bottom,2,2,0.0
all, 11, 11, <initMU>
all, 12, 12, <initOmg1>
all, 13, 13, <initOmg2>
RigidRef,encastre
extraElement,encastre
extraElement,11,11,0.0
**
*Restart, write, overlay
*Output, field, frequency=2, time marks=no
*node output, nset=all
u, nt, rf
** specify the user-defined output for the dummy element set
*element output, elset=elDummy
uvarm, le
*End Step
************************************************************************
************************************************************************
*Step, Name=swell, nlgeom=yes, inc=50000, UNSYMM=YES
*Coupled temperature-displacement, stabilize, deltmx=100.0
<dtInit_swl>, <t_swell>, <dtMin>, <dtMax_swl>
*CONTROLS, PARAMETERS=TIME INCREMENTATION
,,,,,,,30,,,,,,
*CONTROLS, PARAMETERS=LINE SEARCH
10,1.0,0.0001,0.25,0.10
*Contact controls, STABILIZE
**
*Boundary, op=new
left,1,1,0.0
bottom,2,2,0.0
RigidRef,encastre
** direct amplitude BC
*Boundary, amplitude=mu_init_to_sol, op=new
all, 11, 11, 1.0
*Boundary, amplitude=omg1_init_to_sol, op=new
all, 12, 12, 1.0
*Boundary, amplitude=omg2_init_to_sol, op=new
all, 13, 13, 1.0
**
*Boundary, op=new
extraElement,encastre
extraElement,11,11,0.0
**
*Restart, write, overlay
*Output, field, frequency=2, time marks=no
*node output, nset=all
u, nt, rf
** specify the user-defined output for the dummy element set
*element output, elset=elDummy
uvarm, le
*End Step
************************************************************************
************************************************************************
*Step, Name=compress, nlgeom=yes, convert sdi = yes, inc=50000, UNSYMM=YES
*Coupled temperature-displacement, STABILIZE, ALLSDTOL, CONTINUE=yes, deltmx=100.0
<dtInit_comp>, <t_compress>, <dtMin>, <dtMax_comp>
*CONTROLS, PARAMETERS=TIME INCREMENTATION
,,,,,,,30,,,,,,
*CONTROLS, PARAMETERS=LINE SEARCH
10,1.0,0.0001,0.25,0.10
*Contact controls, STABILIZE
**
*Boundary, op=new
left,1,1,0.0
bottom,2,2,0.0
**
right, 11, 11, <mu_sol>
right, 12, 12, <omg1_sol>
right, 13, 13, <omg2_sol>
**
RigidRef,1,1,0.0
RigidRef,3,6,0.0
**
*Cload, amplitude=ForceAmp
RigidRef, 2, -1.0
**
** *Boundary, amplitude=DispAmp, OP=New
** RigidRef,2,2,-1.0
**
*Boundary, op=new
extraElement,encastre
extraElement,11,11,0.0
**
*Restart, write, overlay
*Output, field, frequency=1, time marks=no
*node output, nset=all
u, nt, rf
*node output, nset=RigidRef
u,rf
** specify the user-defined output for the dummy element set
*element output, elset=elDummy
uvarm, le
*Output, history
*node output,nset=RigidRef
u2,rf2
*End Step
************************************************************************
************************************************************************
