*Heading
************************************************************************
** PARAMETERS (SI UNIT SYSTEM)
** To ensure conevergence, time step size may need to be changed sometimes
************************************************************************
*Parameter
** geometric parameters, element properties, and material ID
nDim        = 2
nStress     = 3
nNode       = 4
nInt        = 4
fbar        = 0
matID       = 1
nIons       = 2
nIonProps   = 5
matProps    = 15 + nIons*nIonProps
intProps    = 5
nstatev     = (nIons + 2)
nsvars      = nstatev*nInt
nPostVars   = 2*nStress + nstatev
**
** properties of rubber substrate
**
Grubber     = 66.0e3
Krubber     = 100.0*Grubber
C10         = Grubber/2.0
Drubber     = 2.0/Krubber
**
** physical constants and material properties
**
Rgas        = 8.3145
Fcon        = 96485.0
theta       = 298.0
phi0        = 0.10
rho         = 1100.0
Gshear      = 33.0e3
kappa       = 50.0*Gshear
pKa         = 0.0
Cp_fix      = 150.0
Vp          = 8.928e-3
Zp          = 1.0
mu0         = 0.0
Vw          = 1.8e-5
chi         = 0.495
Dw          = 9e-7
**
** properties of ions in gel
**
Cion1_gel   = 50.0
Cion2_gel   = 200.0
Omg0_1      = 0.
Omg0_2      = 0.
Vion_1      = 2.38e-6
Vion_2      = 2.24e-6
Zion_1      = 1.0
Zion_2      = -1.0
Dion_1      = 4.0e-8
Dion_2      = 4.0e-8
**
** initial conditions in gel (assuming zero electric potential and pressure)
**
RT          = Rgas*theta
Cw0_gel     = (1.0 - phi0)/Vw
**
initMU      = mu0 + RT*(phi0+log(1-phi0)+chi*phi0**2) - RT/Cw0_gel*(Cion1_gel + Cion2_gel)
initOmg1    = Omg0_1 + RT*log(Cion1_gel/Cw0_gel)
initOmg2    = Omg0_2 + RT*log(Cion2_gel/Cw0_gel)
**
** properties of ions in low salt solution
**
Cw_sol        = 55000.0
**
Cion1_sol     = 700.0
Cion2_sol     = 700.0
**
mu_sol        = mu0 - RT/Cw_sol*(Cion1_sol + Cion2_sol)
omg1_sol      = Omg0_1 + RT*log(Cion1_sol/Cw_sol)
omg2_sol      = Omg0_2 + RT*log(Cion2_sol/Cw_sol)
**
*************************************************************************
** time parameters
t_swell         = 3600.0*6.0
tRamp_swl       = 180.0
dtInit_swl      = 1.0e-6
dtMax_swl       = 300.0
**
dtMin           = 1.0e-15
**
************************************************************************
** GEOMETRY and MESH
************************************************************************
*Node
1, 0.000000000000, 0.000000000000
2, 0.000100000000, 0.000000000000
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*Element, type=CPE4H
1, 1, 2, 28, 27
2, 2, 3, 29, 28
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*User Element,Type=U6,Coordinates=<nDim>,Nodes=<nNode>,Properties=<matProps>,Iproperties=<intProps>,Variables=<nsvars>,Unsymm
1,2,11,12,13
*Element, type=U6
251, 261, 262, 288, 287
252, 262, 263, 289, 288
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*System
*Nset, nset=all, generate
1, 546, 1
*Elset, elset=all, generate
1, 500, 1
*Nset, nset=bottom, generate
1, 26, 1
*Elset, elset=bottom, generate
1, 25, 1
*Nset, nset=gel, generate
261, 546, 1
*Elset, elset=gel, generate
251, 500, 1
*Nset, nset=left, generate
1, 521, 26
*Elset, elset=left, generate
1, 476, 25
*Nset, nset=pinned
1,
*Nset, nset=right, generate
26, 546, 26
*Elset, elset=right, generate
25, 500, 25
*Nset, nset=rubber, generate
1, 275, 1
*Elset, elset=rubber, generate
1, 250, 1
*Nset, nset=top, generate
521, 546, 1
*Elset, elset=top, generate
476, 500, 1
*Element, type=CPE4
100251, 261, 262, 288, 287
100252, 262, 263, 289, 288
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*Elset, elset=ElDummy, generate
100251, 100500, 1
*Node
999996,  0.02E-3, 0.02E-3
999997,  0.02001e-3, 0.02E-3
999998,  0.02001e-3, 0.02001e-3
999999,  0.02E-3, 0.02001e-3
*Element, Type=CPE4T
999999,999996,999997,999998,999999
*Nset, nset=extraElement
999996,999997,999998,999999
*Elset,elset=extraElement
999999
***************************************************************************
** MATERIAL DEFINITION
***************************************************************************
** Material properties for the Swellable Gel Elements
*uel property,elset=gel
** Rgas Fcon theta phi0 rho Gshear kappa pKa
<Rgas>, <Fcon>, <theta>, <phi0>, <rho>, <Gshear>, <kappa>, <pKa>,
** Cp_fx Vp Zp mu0 Vw chi Dw Cion(k)
<Cp_fix>, <Vp>, <Zp>, <mu0>, <Vw>, <chi>, <Dw>, <Cion1_gel>,
** Cion_gel(k) ... Omg0(k) ... Vion(k)
<Omg0_1>, <Vion_1>, <Zion_1>, <Dion_1>, <Cion2_gel>, <Omg0_2>, <Vion_2>, <Zion_2>,
** Zion(k) ... Dion(k) nInt fbar matID nIonProps nPostVars
<Dion_2>, <nInt>, <fbar>, <matID>, <nIonProps>, <nPostVars>
**
***************************************************************************
*Solid section, elset=rubber, material=rubber
**
*Material, name=rubber
*Hyperelastic, neo hooke
<C10>,<Drubber>
***************************************************************************
*Solid section, elset=ElDummy, material=DummyMaterial
*Material, name=DummyMaterial
*Elastic
1.e-20
**
*User output variables
<nPostVars>
***************************************************************************
*Solid section, elset=extraElement, material=extraMaterial
*Material, name=extraMaterial
*Elastic
1.e-20
*Conductivity
1.0
*Density
1.0
*Specific heat
1.0
************************************************************************
** AMPLITUDE DEFINITION
************************************************************************
** as-prepared to low salt solution
*Amplitude, name=mu_prep_to_sol, definition = smooth step
0.0, <initMU>, <tRamp_swl>, <mu_sol>
*Amplitude, name=omg1_prep_to_sol, definition = smooth step
0.0, <initOmg1>, <tRamp_swl>, <omg1_sol>
*Amplitude, name=omg2_prep_to_sol, definition = smooth step
0.0, <initOmg2>, <tRamp_swl>, <omg2_sol>
**
************************************************************************
** INITIAL CONDITIONS
************************************************************************
** Define the initial chemical potential
*Initial conditions, type=temperature
gel, <initMU>, <initOmg1>, <initOmg2>
** Define an arbitrary initial condition for the ‘‘extra’’ element.
*Initial conditions, type=temperature
extraElement, 0.0
************************************************************************
** STEP DEFINITION
************************************************************************
*Step, Name=swell_bend, nlgeom=yes, inc=50000, UNSYMM=YES
*Coupled temperature-displacement, stabilize, deltmx=100.0
<dtInit_swl>, <t_swell>, <dtMin>, <dtMax_swl>
*CONTROLS, PARAMETERS=TIME INCREMENTATION
,,,,,,,30,,,,,,
*CONTROLS, PARAMETERS=LINE SEARCH
10,1.0,0.0001,0.25,0.10
**
*Boundary
left,1,1,0.0
pinned,2,2,0.0
** direct amplitude BC
*Boundary, amplitude=mu_prep_to_sol
top, 11, 11, 1.0
*Boundary, amplitude=omg1_prep_to_sol
top, 12, 12, 1.0
*Boundary, amplitude=omg2_prep_to_sol
top, 13, 13, 1.0
**
*Boundary
extraElement,encastre
extraElement,11,11,0.0
**
*Restart, write, overlay
*Output, field, frequency=2, time marks=no
*node output, nset=all
u, nt, rf
** specify the user-defined output for the dummy element set
*element output, elset=elDummy
uvarm, le
*element output, elset=rubber
le, s
*End Step
*************************************************************************
*************************************************************************
